// SBML level 3 version 1
// This model was downloaded from BioModels Database
// http://www.ebi.ac.uk/biomodels/

function KL_21032(Vmax, Vmax_Km, A, Km)
  Vmax*A/(Km + A);
end
// isDerivedFrom sabiork.kineticrecord:21032

model BMID000000081104()
  // D-Alanine metabolism
  // Model of “D-Alanine metabolism” in “Bacillus subtilis 168”
  // Graphical representation of 'D-Alanine metabolism (Bacillus subtilis 168)'
  // (PNG image hosted by the Kyoto Encyclopedia of Genes and Genomes, KEGG).
  // This model has been automatically generated by KEGGtranslator V2.2.0 (KEGGtranslator: visualizing and converting the KEGG PATHWAY database to various formats. Wrzodek C, Dräger A, Zell A. Bioinformatics . 2011, 27 :2314-2315) using information coming from the KEGG PATHWAY Database ( original pathway ).
  // Some kinetic information were added from SABIO-RK : database for biochemical reaction kinetics .
  // The missing kinetic equations were added by SBMLsqueezer .
  // This model has been produced by the path2models project, it is currently hosted on BioModels Database and identified by: BMID000000081104 .
  // To the extent possible under law, all copyright and related or neighbouring rights to this encoded model have been dedicated to the public domain worldwide. Please refer to CC0 Public Domain Dedication for more information.
  // isDerivedFrom kegg.pathway:bsu00473
  // occursIn taxonomy:224308
  // isDescribedBy GO:0046436
  // biomodels.db:BMID000000081104
  // model units - substance: substance, time: time, volume: volume

  // Compartments:
  compartment default = 1;

  // Species:
  // Original Kegg Entry
  // Description for “ddl”: D-alanyl-alanine synthetase A (EC:6.3.2.4)
  species ddl in default = 1/default;  // uniprot:P96612; occursIn kegg.reaction:R01150; hasProperty ec-code:6.3.2.4; isEncodedBy entrez.gene:938224
  // Original Kegg Entry
  // Description for “dat”: D-alanine aminotransferase (EC:2.6.1.21)
  species dat in default = 1/default;  // uniprot:O07597; occursIn kegg.reaction:R01148; hasProperty ec-code:2.6.1.21; isEncodedBy entrez.gene:939759
  // Original Kegg Entry
  // Description for “alrA”: D-alanine racemase (EC:5.1.1.1)
  // Description for “alrB”: alanine racemase (EC:5.1.1.1)
  species alr in default = 1/default;  // hasVersion uniprot:P10725 uniprot:P94494; occursIn kegg.reaction:R00401; hasProperty ec-code:5.1.1.1; isEncodedBy entrez.gene:939942 entrez.gene:939550
  // Original Kegg Entry
  // Description for “dltA”: D-alanine--poly(phosphoribitol) ligase subunit 1 (EC:6.1.1.13)
  // Description for “dltC”: D-alanine--poly(phosphoribitol) ligase subunit 2 (EC:6.1.1.13)
  species dlt in default = 1/default;  // hasVersion uniprot:P39579 uniprot:P39581; occursIn kegg.reaction:R02718; hasProperty ec-code:6.1.1.13; isEncodedBy entrez.gene:937361 entrez.gene:937358
  // Original Kegg Entry
  // L-alpha-Alanine
  // All given names:
  // L-Alanine
  // L-2-Aminopropionic acid
  // L-alpha-Alanine
  // CAS number: 56-41-7
  // Formula: C3H7NO2
  // Mass: 89.0477
  // Molecular weight: 89.0932
  species LAlanine in default = 1/default; LAlanine is "L-Alanine";  // cas:56-41-7; pdb-ccd:ALA; hasProperty pubchem.substance:3343; CHEBI:16977
  // Original Kegg Entry
  // D-Ala
  // All given names:
  // D-Alanine
  // D-2-Aminopropionic acid
  // D-Ala
  // CAS number: 338-69-2
  // Formula: C3H7NO2
  // Mass: 89.0477
  // Molecular weight: 89.0932
  species DAla in default = 1/default; DAla is "D-Ala";  // cas:338-69-2; pdb-ccd:DAL; hasProperty pubchem.substance:3433; CHEBI:15570
  // Original Kegg Entry
  // D-Ala-D-Ala
  // All given names:
  // D-Alanyl-D-alanine
  // D-Ala-D-Ala
  // CAS number: 923-16-0
  // Formula: C6H12N2O3
  // Mass: 160.0848
  // Molecular weight: 160.1711
  species DAlaDAla in default = 1/default; DAlaDAla is "D-Ala-D-Ala";  // cas:923-16-0; hasProperty pubchem.substance:4239; CHEBI:16576; occursIn kegg.reaction:R01150
  // Original Kegg Entry
  // Pyroracemic acid
  // All given names:
  // Pyruvate
  // Pyruvic acid
  // 2-Oxopropanoate
  // 2-Oxopropanoic acid
  // Pyroracemic acid
  // CAS number: 127-17-3
  // Formula: C3H4O3
  // Mass: 88.016
  // Molecular weight: 88.0621
  species Pyruvate in default = 1/default;  // cas:127-17-3; pdb-ccd:PYR; hasProperty pubchem.substance:3324; CHEBI:32816
  // Original Kegg Entry
  // O-D-Alanyl-poly(ribitol phosphate)
  // Formula: (C8H16NO8P)n
  species ODAlanylpolyribitol_phosphate in default = 1/default; ODAlanylpolyribitol_phosphate is "O-D-Alanyl-poly(ribitol phosphate)";  // hasProperty pubchem.substance:6925; occursIn kegg.reaction:R02718; kegg.compound:C04260; isDescribedBy ECO:0000313
  // Original Kegg Entry
  // D-Alanyl-alanyl-poly(glycerolphosphate)
  // Formula: H2O(C9H17N2O7P)n
  species DAlanylalanylpolyglycerolphosphate in default = 1/default; DAlanylalanylpolyglycerolphosphate is "D-Alanyl-alanyl-poly(glycerolphosphate)";  // hasProperty pubchem.substance:7083; CHEBI:15798; kegg.compound:C04457; isDescribedBy ECO:0000313
  // Original Kegg Entry
  // Adenosine 5'-triphosphate
  // All given names:
  // ATP
  // Adenosine 5'-triphosphate
  // CAS number: 56-65-5
  // Formula: C10H16N5O13P3
  // Mass: 506.9957
  // Molecular weight: 507.181
  species ATP in default = 1/default;  // cas:56-65-5; pdb-ccd:ATP; hasProperty pubchem.substance:3304; CHEBI:15422
  // Original Kegg Entry
  // Adenosine 5'-diphosphate
  // All given names:
  // ADP
  // Adenosine 5'-diphosphate
  // CAS number: 58-64-0
  // Formula: C10H15N5O10P2
  // Mass: 427.0294
  // Molecular weight: 427.2011
  species ADP in default = 1/default;  // cas:58-64-0; pdb-ccd:ADP; hasProperty pubchem.substance:3310; CHEBI:16761
  // Original Kegg Entry
  // Orthophosphoric acid
  // All given names:
  // Orthophosphate
  // Phosphate
  // Phosphoric acid
  // Orthophosphoric acid
  // CAS number: 7664-38-2
  // Formula: H3PO4
  // Mass: 97.9769
  // Molecular weight: 97.9952
  species Phosphate in default = 1/default;  // cas:7664-38-2; hasVersion pdb-ccd:2HP pdb-ccd:PO4; hasProperty pubchem.substance:3311; CHEBI:18367
  // Original Kegg Entry
  // alpha-Ketoglutaric acid
  // All given names:
  // 2-Oxoglutarate
  // Oxoglutaric acid
  // 2-Ketoglutaric acid
  // alpha-Ketoglutaric acid
  // CAS number: 328-50-7
  // Formula: C5H6O5
  // Mass: 146.0215
  // Molecular weight: 146.0981
  species SId_Oxoglutarate in default = 1/default; SId_Oxoglutarate is "2-Oxoglutarate";  // cas:328-50-7; pdb-ccd:AKG; hasProperty pubchem.substance:3328; CHEBI:30915
  // Original Kegg Entry
  // D-2-Aminoglutaric acid
  // All given names:
  // D-Glutamate
  // D-Glutamic acid
  // D-Glutaminic acid
  // D-2-Aminoglutaric acid
  // CAS number: 6893-26-1
  // Formula: C5H9NO4
  // Mass: 147.0532
  // Molecular weight: 147.1293
  species DGlutamate in default = 1/default; DGlutamate is "D-Glutamate";  // cas:6893-26-1; hasVersion pdb-ccd:FGA pdb-ccd:DGL; hasProperty pubchem.substance:3517; CHEBI:15966
  // Original Kegg Entry
  // (Ribitol phosphate)n+1
  // All given names:
  // Poly(ribitol phosphate)
  // Poly-1,5-ribitol phosphate
  // (Ribitol phosphate)n
  // (Ribitol phosphate)n+1
  // Formula: (C5H11O7P)n
  species SId_Ribitol_phosphaten in default = 1/default; SId_Ribitol_phosphaten is "(Ribitol phosphate)n";  // hasProperty pubchem.substance:3924; CHEBI:16051; occursIn kegg.reaction:R02718; kegg.glycan:G10558
  // Original Kegg Entry
  // Adenosine 5'-phosphate
  // All given names:
  // AMP
  // Adenosine 5'-monophosphate
  // Adenylic acid
  // Adenylate
  // 5'-AMP
  // 5'-Adenylic acid
  // 5'-Adenosine monophosphate
  // Adenosine 5'-phosphate
  // CAS number: 61-19-8
  // Formula: C10H14N5O7P
  // Mass: 347.0631
  // Molecular weight: 347.2212
  species AMP in default = 1/default;  // cas:61-19-8; hasVersion pdb-ccd:AP7 pdb-ccd:AMP; hasProperty pubchem.substance:3322; CHEBI:16027
  // Original Kegg Entry
  // PPi
  // All given names:
  // Diphosphate
  // Diphosphoric acid
  // Pyrophosphate
  // Pyrophosphoric acid
  // PPi
  // CAS number: 2466-09-3
  // Formula: H4P2O7
  // Mass: 177.9432
  // Molecular weight: 177.9751
  species PPi in default = 1/default;  // cas:2466-09-3; hasVersion pdb-ccd:DPO pdb-ccd:POP pdb-ccd:PPV; hasProperty pubchem.substance:3315; hasVersion CHEBI:29888 CHEBI:18361

  // Reactions:
  // Convenience kinetics
  // Definition of “RN:R01150”: ATP + 2 D-Alanine <=> ADP + Orthophosphate + D-Alanyl-D-alanine
  // Equation for “RN:R01150”: C00002 + 2 C00133 <=> C00008 + C00009 + C00993
  // Occurs in:
  // D-Alanine metabolism
  // Peptidoglycan biosynthesis
  // Metabolic pathways
  rnR01150: 2 DAla + ATP => DAlaDAla + ADP + Phosphate; ddl*default*(kcat_rnR01150_ddl*(DAla*default/kmc_rnR01150_DAla_ddl)^cpdC00133*(ATP*default/kmc_rnR01150_ATP_ddl)^cpdC00002/((1 + DAla*default/kmc_rnR01150_DAla_ddl + (DAla*default/kmc_rnR01150_DAla_ddl)^cpdC00133)*(1 + (ATP*default/kmc_rnR01150_ATP_ddl)^cpdC00002))); rnR01150 is "rn:R01150";  // modifiers: ddl; kegg.reaction:R01150; occursIn kegg.pathway:rn00473 kegg.pathway:rn00550 kegg.pathway:rn01100; isDescribedBy ECO:0000313
    kcat_rnR01150_ddl = 1 per_SECOND; kmc_rnR01150_DAla_ddl = 1 substance; kmc_rnR01150_ATP_ddl = 1 substance;
  // Definition of “RN:R01148”: D-Alanine + 2-Oxoglutarate <=> Pyruvate + D-Glutamate
  // Equation for “RN:R01148”: C00133 + C00026 <=> C00022 + C00217
  // Occurs in:
  // D-Alanine metabolism
  // Metabolic pathways
  rnR01148: DAla + SId_Oxoglutarate -> Pyruvate + DGlutamate; dat*default*((kcrf_rnR01148_dat*(DAla*default/kmc_rnR01148_DAla_dat)^(cpdC00133_1*hco_rnR01148_dat)*(SId_Oxoglutarate*default/kmc_rnR01148_SId_Oxoglutarate_dat)^(cpdC00026*hco_rnR01148_dat) - kcrr_rnR01148_dat*(Pyruvate*default/kmc_rnR01148_Pyruvate_dat)^(cpdC00022*hco_rnR01148_dat)*(DGlutamate*default/kmc_rnR01148_DGlutamate_dat)^(cpdC00217*hco_rnR01148_dat))/((1 + DAla*default/kmc_rnR01148_DAla_dat)^(cpdC00133_1*hco_rnR01148_dat)*(1 + SId_Oxoglutarate*default/kmc_rnR01148_SId_Oxoglutarate_dat)^(cpdC00026*hco_rnR01148_dat) + (1 + Pyruvate*default/kmc_rnR01148_Pyruvate_dat)^(cpdC00022*hco_rnR01148_dat)*(1 + DGlutamate*default/kmc_rnR01148_DGlutamate_dat)^(cpdC00217*hco_rnR01148_dat) - 1)); rnR01148 is "rn:R01148";  // modifiers: dat; kegg.reaction:R01148; occursIn kegg.pathway:rn00473 kegg.pathway:rn01100; isDescribedBy ECO:0000313
    kcrf_rnR01148_dat = 1 per_SECOND; hco_rnR01148_dat = 1 dimensionless; kmc_rnR01148_DAla_dat = 1 substance; kmc_rnR01148_SId_Oxoglutarate_dat = 1 substance; kcrr_rnR01148_dat = 1 per_SECOND; kmc_rnR01148_Pyruvate_dat = 1 substance; kmc_rnR01148_DGlutamate_dat = 1 substance;
  // Definition of “RN:R00401”: L-Alanine <=> D-Alanine
  // Equation for “RN:R00401”: C00041 <=> C00133
  // Occurs in:
  // D-Alanine metabolism
  // Metabolic pathways
  rnR00401: LAlanine -> DAla; KL_21032(Vmax, Vmax_Km_SPC_67_Cell, LAlanine, Km_SPC_67_Cell); rnR00401 is "rn:R00401";  // modifiers: alr; kegg.reaction:R00401; occursIn kegg.pathway:rn00473 kegg.pathway:rn01100; isDescribedBy ECO:0000313
    Km_SPC_67_Cell = 0.0196 M; Vmax_Km_SPC_67_Cell = 0.000102 swedgeone; Vmax = 1.99833e-6 Mswedgeone;
  // Convenience kinetics
  // Definition of “RN:R02718”: ATP + D-Alanine + Poly(ribitol phosphate) <=> AMP + Diphosphate + O-D-Alanyl-poly(ribitol phosphate)
  // Equation for “RN:R02718”: C00002 + C00133 + C00653 <=> C00020 + C00013 + C04260
  // Occurs in:
  // D-Alanine metabolism
  rnR02718: DAla + ATP + SId_Ribitol_phosphaten => ODAlanylpolyribitol_phosphate + AMP + PPi; dlt*default*(kcat_rnR02718_dlt*(DAla*default/kmc_rnR02718_DAla_dlt)^cpdC00133_3*(ATP*default/kmc_rnR02718_ATP_dlt)^cpdC00002_1*(SId_Ribitol_phosphaten*default/kmc_rnR02718_SId_Ribitol_phosphaten_dlt)^cpdC00653/((1 + (DAla*default/kmc_rnR02718_DAla_dlt)^cpdC00133_3)*(1 + (SId_Ribitol_phosphaten*default/kmc_rnR02718_SId_Ribitol_phosphaten_dlt)^cpdC00653)*(1 + (ATP*default/kmc_rnR02718_ATP_dlt)^cpdC00002_1))); rnR02718 is "rn:R02718";  // modifiers: dlt; kegg.reaction:R02718; occursIn kegg.pathway:rn00473; isDescribedBy ECO:0000313
    kcat_rnR02718_dlt = 1 per_SECOND; kmc_rnR02718_DAla_dlt = 1 substance; kmc_rnR02718_ATP_dlt = 1 substance; kmc_rnR02718_SId_Ribitol_phosphaten_dlt = 1 substance;

  // Unit definitions:
  unit time = second; time is "Predefined unit time";
  unit volume = litre; volume is "Predefined unit volume";
  unit substance = mole; substance is "Predefined unit substance";
  unit M = mole / litre;  // isDerivedFrom sabiork.kineticrecord:21032
  unit swedgeone = 1 / second; swedgeone is "s^(-1)";  // isDerivedFrom sabiork.kineticrecord:21032
  unit Mswedgeone = mole / (litre * second); Mswedgeone is "M*s^(-1)";  // isDerivedFrom sabiork.kineticrecord:21032
  unit per_SECOND = 1 / second; per_SECOND is "per second";
end
