// SBML level 3 version 1
// This model was downloaded from BioModels Database
// http://www.ebi.ac.uk/biomodels/

model BMID000000081099()
  // Sphingolipid metabolism
  // Model of “Sphingolipid metabolism” in “Bacillus subtilis 168”
  // Graphical representation of 'Sphingolipid metabolism (Bacillus subtilis 168)'
  // (PNG image hosted by the Kyoto Encyclopedia of Genes and Genomes, KEGG).
  // This model has been automatically generated by KEGGtranslator V2.2.0 (KEGGtranslator: visualizing and converting the KEGG PATHWAY database to various formats. Wrzodek C, Dräger A, Zell A. Bioinformatics . 2011, 27 :2314-2315) using information coming from the KEGG PATHWAY Database ( original pathway ).
  // The missing kinetic equations were added by SBMLsqueezer .
  // This model has been produced by the path2models project, it is currently hosted on BioModels Database and identified by: BMID000000081099 .
  // To the extent possible under law, all copyright and related or neighbouring rights to this encoded model have been dedicated to the public domain worldwide. Please refer to CC0 Public Domain Dedication for more information.
  // isDerivedFrom kegg.pathway:bsu00600
  // occursIn taxonomy:224308
  // isDescribedBy GO:0006665 GO:0030148
  // biomodels.db:BMID000000081099
  // model units - substance: substance, time: time, volume: volume

  // Compartments:
  compartment default = 1;

  // Species:
  // Original Kegg Entry
  // 2-Amino-1,3-dihydroxyoctadecane
  // All given names:
  // Sphinganine
  // Dihydrosphingosine
  // 2-Amino-1,3-dihydroxyoctadecane
  // CAS number: 764-22-7
  // Formula: C18H39NO2
  // Mass: 301.2981
  // Molecular weight: 301.5078
  species Sphinganine in default = 1/default;  // cas:764-22-7; hasProperty pubchem.substance:4094; CHEBI:16566; hasProperty 3dmet:B04734
  // Original Kegg Entry
  // 4-D-Hydroxysphinganine
  // All given names:
  // Phytosphingosine
  // 4-D-Hydroxysphinganine
  // CAS number: 554-62-1
  // Formula: C18H39NO3
  // Mass: 317.293
  // Molecular weight: 317.5072
  species Phytosphingosine in default = 1/default;  // cas:554-62-1; hasProperty pubchem.substance:14291; CHEBI:46961; hasProperty 3dmet:B04437
  // Original Kegg Entry
  // N-Acyl-4-hydroxysphinganine
  // All given names:
  // Phytoceramide
  // Ceramide II
  // N-Acyl-4-hydroxysphinganine
  // Formula: C19H38NO4R
  species Ceramide_II in default = 1/default;  // hasProperty pubchem.substance:14292; CHEBI:31998; kegg.compound:C12145; isDescribedBy ECO:0000313
  // Original Kegg Entry
  // N-Acylsphinganine
  // All given names:
  // Dihydroceramide
  // N-Acylsphinganine
  // Formula: C19H38NO3R
  species Dihydroceramide in default = 1/default;  // hasProperty pubchem.substance:14273; CHEBI:31488; kegg.compound:C12126; isDescribedBy ECO:0000313
  // Original Kegg Entry
  // D-Galactosyl-1,4-beta-D-glucosylceramide
  // All given names:
  // beta-D-Galactosyl-1,4-beta-D-glucosylceramide
  // Lactosylceramide
  // Gal-beta1->4Glc-beta1->1'Cer
  // LacCer
  // Lactosyl-N-acylsphingosine
  // D-Galactosyl-1,4-beta-D-glucosylceramide
  // Formula: C31H56NO13R
  species LacCer in default = 1/default;  // hasProperty pubchem.substance:4509; CHEBI:17950; occursIn kegg.reaction:R03355; kegg.glycan:G00092
  // Original Kegg Entry
  // Sphing-4-enine 1-phosphate
  // All given names:
  // Sphingosine 1-phosphate
  // Sphing-4-enine 1-phosphate
  // CAS number: 26993-30-6
  // Formula: C18H38NO5P
  // Mass: 379.2488
  // Molecular weight: 379.4718
  species Sphingosine_1phosphate in default = 1/default; Sphingosine_1phosphate is "Sphingosine 1-phosphate";  // cas:26993-30-6; pdb-ccd:S1P; hasProperty pubchem.substance:8381; CHEBI:37550
  // Original Kegg Entry
  // Description for “melA”: alpha-D-galactoside galactohydrolase (EC:3.2.1.-)
  species melA in default = 1/default;  // uniprot:O34645; occursIn kegg.reaction:R04019; hasProperty ec-code:3.2.1.- ec-code:3.2.1.22; isEncodedBy ncbigene:937255
  // Original Kegg Entry
  // Description for “yesZ”: beta-galacturonidase (EC:3.2.1.-)
  species yesZ in default = 1/default;  // uniprot:O31529; occursIn kegg.reaction:R03355; hasProperty ec-code:3.2.1.- ec-code:3.2.1.23; isEncodedBy ncbigene:936080
  // Original Kegg Entry
  // D-Glucosyl-N-acylsphingosine
  // All given names:
  // Glucosylceramide
  // Glucocerebroside
  // D-Glucosyl-N-acylsphingosine
  // Formula: C25H46NO8R
  species Glucosylceramide in default = 1/default;  // hasProperty pubchem.substance:4416; CHEBI:18368; occursIn kegg.reaction:R03355; kegg.glycan:G10238
  // Original Kegg Entry
  // Dihydrosphingosine 1-phosphate
  // All given names:
  // Sphinganine 1-phosphate
  // Dihydrosphingosine 1-phosphate
  // CAS number: 19794-97-9
  // Formula: C18H40NO5P
  // Mass: 381.2644
  // Molecular weight: 381.4877
  species Sphinganine_1phosphate in default = 1/default; Sphinganine_1phosphate is "Sphinganine 1-phosphate";  // cas:19794-97-9; hasProperty pubchem.substance:4351; CHEBI:16893; hasProperty 3dmet:B04771
  // Original Kegg Entry
  // O-Phosphoethanolamine
  // All given names:
  // Ethanolamine phosphate
  // O-Phosphorylethanolamine
  // Phosphoethanolamine
  // O-Phosphoethanolamine
  // CAS number: 1071-23-4
  // Formula: C2H8NO4P
  // Mass: 141.0191
  // Molecular weight: 141.063
  species Phosphoethanolamine in default = 1/default;  // cas:1071-23-4; pdb-ccd:OPE; hasProperty pubchem.substance:3639; CHEBI:17553
  // Original Kegg Entry
  // Ceramide phosphoethanolamine
  // Formula: C21H42N2O6PR
  species Ceramide_phosphoethanolamine in default = 1/default;  // hasProperty pubchem.substance:8332; kegg.compound:C06062; isDescribedBy ECO:0000313
  // Original Kegg Entry
  // Ceramide ciliatine
  // All given names:
  // Ceramide 2-aminoethylphosphonate
  // Ceramide ciliatine
  // Formula: C21H42N2O5PR
  species Ceramide_ciliatine in default = 1/default;  // hasProperty pubchem.substance:7988; kegg.compound:C05681; isDescribedBy ECO:0000313
  // Original Kegg Entry
  // 3-Dehydro-D-sphinganine
  // All given names:
  // 3-Dehydrosphinganine
  // 3-Dehydro-D-sphinganine
  // Formula: C18H37NO2
  // Mass: 299.2824
  // Molecular weight: 299.4919
  species SId_Dehydrosphinganine in default = 1/default; SId_Dehydrosphinganine is "3-Dehydrosphinganine";  // hasProperty pubchem.substance:5855; CHEBI:17862; hasProperty 3dmet:B01613; hasProperty lipidbank:DLB0241
  // Original Kegg Entry
  // Serine
  // All given names:
  // L-Serine
  // L-2-Amino-3-hydroxypropionic acid
  // L-3-Hydroxy-alanine
  // Serine
  // CAS number: 56-45-1
  // Formula: C3H7NO3
  // Mass: 105.0426
  // Molecular weight: 105.0926
  species Serine in default = 1/default;  // cas:56-45-1; pdb-ccd:SER; hasProperty pubchem.substance:3365; CHEBI:17115
  // Original Kegg Entry
  // Hexadecanoyl-CoA
  // All given names:
  // Palmitoyl-CoA
  // Hexadecanoyl-CoA
  // CAS number: 1763-10-6
  // Formula: C37H66N7O17P3S
  // Mass: 1005.3449
  // Molecular weight: 1005.9429
  species PalmitoylCoA in default = 1/default; PalmitoylCoA is "Palmitoyl-CoA";  // cas:1763-10-6; hasProperty pubchem.substance:3454; CHEBI:15525; hasProperty 3dmet:B04641
  // Original Kegg Entry
  // Sphing-4-enine
  // All given names:
  // Sphingosine
  // Sphingenine
  // Sphingoid
  // Sphing-4-enine
  // CAS number: 123-78-4
  // Formula: C18H37NO2
  // Mass: 299.2824
  // Molecular weight: 299.4919
  species Sphingoid in default = 1/default;  // cas:123-78-4; hasProperty pubchem.substance:3613; CHEBI:16393; hasProperty 3dmet:B01215
  // Original Kegg Entry
  // Ceramide
  // All given names:
  // N-Acylsphingosine
  // Ceramide
  // Formula: C19H36NO3R
  species Ceramide in default = 1/default;  // hasProperty pubchem.substance:3495; hasVersion CHEBI:17761 CHEBI:52639; kegg.compound:C00195; isDescribedBy ECO:0000313
  // Original Kegg Entry
  // D-Galactosylceramide
  // All given names:
  // Galactosylceramide
  // Galactocerebroside
  // D-Galactosyl-N-acylsphingosine
  // Cerebroside
  // D-Galactosylceramide
  // Formula: C25H46NO8R
  species Cerebroside in default = 1/default;  // hasProperty pubchem.substance:5655; CHEBI:18390; occursIn kegg.reaction:R04019; kegg.glycan:G11121
  // Original Kegg Entry
  // O-Galactosylsphingosine
  // All given names:
  // Psychosine
  // Galactosylsphingosine
  // O-Galactosylsphingosine
  // CAS number: 2238-90-6
  // Formula: C24H47NO7
  // Mass: 461.3353
  // Molecular weight: 461.6325
  species Psychosine in default = 1/default;  // cas:2238-90-6; hasProperty pubchem.substance:4881; CHEBI:16874; hasProperty 3dmet:B01491
  // Original Kegg Entry
  // Sphingosyl-phosphocholine
  // Formula: C23H50N2O5P
  // Mass: 465.3457
  // Molecular weight: 465.6273
  species Sphingosylphosphocholine in default = 1/default; Sphingosylphosphocholine is "Sphingosyl-phosphocholine";  // pdb-ccd:SPU; hasProperty pubchem.substance:6422; CHEBI:52897; hasProperty 3dmet:B01677
  // Original Kegg Entry
  // Ceramide phosphate
  // All given names:
  // Ceramide 1-phosphate
  // Ceramide phosphate
  // Formula: C19H37NO6PR
  species Ceramide_phosphate in default = 1/default;  // hasProperty pubchem.substance:5876; CHEBI:16197; kegg.compound:C02960; isDescribedBy ECO:0000313
  // Original Kegg Entry
  // Sphingomyelin
  // Formula: C24H49N2O6PR
  species Sphingomyelin in default = 1/default;  // hasProperty pubchem.substance:3831; hasVersion CHEBI:62490 CHEBI:17636; hasProperty lipidbank:PSP5013; kegg.compound:C00550
  // Original Kegg Entry
  // Cerebroside 3-sulfate
  // All given names:
  // Sulfatide
  // Galactosylceramidesulfate
  // Cerebroside 3-sulfate
  // Formula: C25H46NO11SR
  species Sulfatide in default = 1/default;  // hasProperty pubchem.substance:8382; CHEBI:18318; kegg.glycan:G11122; hasProperty lipidbank:GSG3051
  // Original Kegg Entry
  // Neu5Ac-alpha2->3Gal-beta1->1'Cer
  // All given names:
  // GM4
  // N-Acetylneuraminyl-galactosylceramide
  // Neu5Ac-alpha2->3Gal-beta1->1'Cer
  // Formula: C36H63N2O16R
  species GM4 in default = 1/default;  // hasProperty pubchem.substance:8385; CHEBI:27499; kegg.glycan:G00317; kegg.compound:C06128
  // Original Kegg Entry
  // Gal-alpha1->4Gal-beta1->1'Cer
  // All given names:
  // Digalactosylceramide
  // Gal-alpha1->4Gal-beta1->1'Cer
  // Formula: C31H56NO13R
  species Digalactosylceramide in default = 1/default;  // hasProperty pubchem.substance:8383; occursIn kegg.reaction:R04019; kegg.glycan:G00497; kegg.compound:C06126
  // Original Kegg Entry
  // Digalactosylceramidesulfate
  // Formula: C31H56NO16SR
  species Digalactosylceramidesulfate in default = 1/default;  // hasProperty pubchem.substance:8384; kegg.glycan:G10524; kegg.compound:C06127; isDescribedBy ECO:0000313
  // Original Kegg Entry
  // Water
  // All given names:
  // H2O
  // Water
  // CAS number: 7732-18-5
  // Formula: H2O
  // Mass: 18.0106
  // Molecular weight: 18.0153
  species H2O in default = 1/default;  // cas:7732-18-5; pdb-ccd:HOH; hasProperty pubchem.substance:3303; CHEBI:15377
  // Original Kegg Entry
  // D-Galactose
  // CAS number: 59-23-4
  // Formula: C6H12O6
  // Mass: 180.0634
  // Molecular weight: 180.1559
  species DGalactose in default = 1/default; DGalactose is "D-Galactose";  // cas:59-23-4; hasVersion pdb-ccd:GLA pdb-ccd:GAL; hasProperty pubchem.substance:3424; CHEBI:4139

  // Reactions:
  // Definition of “RN:R04019”: Digalactosylceramide + H2O <=> Galactosylceramide + D-Galactose
  // Equation for “RN:R04019”: C06126 + C00001 <=> C02686 + C00124
  // Occurs in:
  // Sphingolipid metabolism
  rnR04019: Digalactosylceramide + H2O => Cerebroside + DGalactose; melA*default*(kcat_rnR04019_melA*Digalactosylceramide*default/(kmc_rnR04019_Digalactosylceramide_melA + Digalactosylceramide*default)); rnR04019 is "rn:R04019";  // modifiers: melA; kegg.reaction:R04019; occursIn kegg.pathway:rn00600; isDescribedBy ECO:0000313
    kcat_rnR04019_melA = 1 per_SECOND; kmc_rnR04019_Digalactosylceramide_melA = 1 substance;
  // Definition of “RN:R03355”: beta-D-Galactosyl-1,4-beta-D-glucosylceramide + H2O <=> Glucosylceramide + D-Galactose
  // Equation for “RN:R03355”: C01290 + C00001 <=> C01190 + C00124
  // Occurs in:
  // Sphingolipid metabolism
  // Metabolic pathways
  rnR03355: LacCer + H2O => Glucosylceramide + DGalactose; yesZ*default*(kcat_rnR03355_yesZ*LacCer*default/(kmc_rnR03355_LacCer_yesZ + LacCer*default)); rnR03355 is "rn:R03355";  // modifiers: yesZ; kegg.reaction:R03355; occursIn kegg.pathway:rn00600 kegg.pathway:rn01100; isDescribedBy ECO:0000313
    kcat_rnR03355_yesZ = 1 per_SECOND; kmc_rnR03355_LacCer_yesZ = 1 substance;

  // Unit definitions:
  unit time = second; time is "Predefined unit time";
  unit volume = litre; volume is "Predefined unit volume";
  unit substance = mole; substance is "Predefined unit substance";
  unit per_SECOND = 1 / second; per_SECOND is "per second";
end
